OpenVSP model (file version 5), 5 components.
Geometry view with OpenVSP parameter names; values to 6 digits, angles in degrees, lengths in the model's unit.
Overall bounding box: X_Min=0 X_Len=35.9057 Y_Min=-22.357 Y_Len=44.7141 Z_Min=-3.00026 Z_Len=10.2342

Fuselage "Fuselage"
  location (X Y Z) 0 0 0, rotation 0 0 0
  bounding box size 35.5 4.3905 6.54494
  Design: Length=35.5
  cross sections:
    n  XLocPercent  YLocPercent  ZLocPercent  shape
    0  0            0            -0.0373444   point
    1  0.157158     0            -0.0171162   rounded rectangle RoundRectXSec_Radius=2 RoundedRect_Height=4.72156 RoundedRect_Width=3.70543
    2  0.269924     0            0.00766805   ellipse Ellipse_Height=6.54494 Ellipse_Width=4.3905
    3  0.404218     0            0.00767      ellipse Ellipse_Height=6.432 Ellipse_Width=4.3905
    4  0.52474      0            0.00259336   rounded rectangle RoundRectXSec_Radius=1 RoundedRect_Height=5.04268 RoundedRect_Width=3.66736
    5  0.627353     0            0            rounded rectangle RoundRectXSec_Radius=0.8 RoundedRect_Height=3.97085 RoundedRect_Width=2.78926
    6  0.760463     0            0.00155602   rounded rectangle RoundRectXSec_Radius=0.6 RoundedRect_Height=2.8142 RoundedRect_Width=1.80785
    7  0.832991     0            0.00259336   rounded rectangle RoundRectXSec_Radius=0.5 RoundedRect_Height=2.19741 RoundedRect_Width=1.29132
    8  0.898793     0            0.00259336   rounded rectangle RoundRectXSec_Radius=0.3 RoundedRect_Height=1.7236 RoundedRect_Width=0.774793
    9  1            0            0.00778008   point

Human "Pilot", child of "Fuselage"
  location (X Y Z) 9.8913 0 0.543478, rotation 0 0 0
  mass: Density=69.0519 Shell_Flag=0 Mass_Area=1 Mass_Prior=0
  Anthropometric: Age=30 AutoDensity=1 BMI=27.7 BMI_pct=0.5 GenderFlag=0 LenUnit=4 Mass=208.492 MassUnit=3 SitFrac=0.51 Stature=6.0621 Stature_pct=0.8839 Volume=3.01935

Wing "Rudder", child of "Fuselage"
  location (X Y Z) 28.7295 0 0.245902, rotation 90 0 0
  bounding box size 6.77778 0.678171 6.92059
  totals: TotalSpan=6.78571 TotalProjectedSpan=6.78571 TotalChord=4.82937 TotalArea=32.7707 TotalAR=1.40509
  root: chord 6.77778, twist 0, NACA 4-series Camber=0 CamberLoc=0.2 ThickChord=0.1
  sections:
    n  Span     Root_Chord  Tip_Chord  Area     Sweep  Sweep_Location  Dihedral  Twist  Twist_Location  tip airfoil
    1  6.78571  6.77778     2.88095    32.7707  25     0               0         0      0.25            as above

Wing "WingGeom", child of "Fuselage"
  location (X Y Z) 10.03 0 -1.96721, rotation 0 0 0
  symmetric about XZ
  bounding box size 16.6662 44.6951 9.45083
  totals: TotalSpan=57.6611 TotalProjectedSpan=44.3029 TotalChord=4.83965 TotalArea=300.048 TotalAR=6.54144
  root: chord 7.27778, twist 0, NACA 4-series Camber=0.0176786 CamberLoc=0.391429 ThickChord=0.142857
  sections:
    n  Span     Root_Chord  Tip_Chord  Area     Sweep    Sweep_Location  Dihedral  Twist  Twist_Location  tip airfoil
    1  20.7824  7.27778     4.04968    117.706  5        0               3         0      0.25            NACA 4-series Camber=0 CamberLoc=0.2 ThickChord=0.1
    2  8.0482   4.04968     3.98146    32.3181  53.4731  0               80        0      0.25            as above

Wing "WingGeom", child of "Fuselage"
  location (X Y Z) 31.9057 0 7.03381, rotation 0 0 0
  symmetric about XZ
  bounding box size 13.2556 44.7141 0.400232
  totals: TotalSpan=44.3862 TotalProjectedSpan=44.3862 TotalChord=4 TotalArea=177.545 TotalAR=11.0966
  root: chord 4, twist 0, NACA 4-series Camber=0 CamberLoc=0.2 ThickChord=0.1
  sections:
    n  Span     Root_Chord  Tip_Chord  Area     Sweep  Sweep_Location  Dihedral  Twist  Twist_Location  tip airfoil
    1  8.98515  4           4          35.9406  0      0               0         0      0.25            as above
    2  13.208   4           4          52.8319  -35    0               0         0      0.25            as above
